// COMSOL Multiphysics 6.2.0.339 model "weldpool_2d.mph"
// 2D weld pool: heat, flow, solidification (Al 5182)
// COMSOL 6.2 counterpart of heat+flow_2d/weldpool2d.py. Moving Gaussian surface heat flux, linear mushy zone with Darcy–Carman–Kozeny sink, Marangoni and Boussinesq buoyancy. No electromagnetism, arc pressure, free-surface deformation, or filler.
// Outline of the model tree

Parameters
  Lx = 40[mm]  // Plate length along weld
  Lz = 6[mm]  // Plate thickness (y)
  nx_mesh = 120  // Mapped elements along x
  nz_mesh = 30  // Mapped elements through thickness
  q_max = 6e7[W/m^2]  // Peak Gaussian heat flux (2D effective)
  rb = 3[mm]  // Gaussian radius (e^{-3} at r=rb)
  v_weld = 5[mm/s]  // Welding speed (+x)
  x0 = 8[mm]  // Arc centre at t=0
  T0 = 300[K]  // Initial temperature
  Ta = 300[K]  // Ambient temperature
  h_top = 20[W/(m^2*K)]  // Top convection coefficient
  h_bot = 50[W/(m^2*K)]  // Bottom convection coefficient
  eps_rad = 0.4  // Surface emissivity
  t_end = 4[s]  // End time
  Ts = 850[K]  // Solidus (Al 5182)
  Tl = 911[K]  // Liquidus (Al 5182)
  rho = 2300[kg/m^3]  // Density
  cp_s = 900[J/(kg*K)]  // Solid heat capacity
  cp_l = 1200[J/(kg*K)]  // Liquid heat capacity
  k_s = 168[W/(m*K)]  // Solid conductivity
  k_l = 108[W/(m*K)]  // Liquid conductivity
  mu = 1.1e-3[Pa*s]  // Dynamic viscosity
  dsigma_dT = -3.5e-4[N/(m*K)]  // d(sigma)/dT (Marangoni)
  L_latent = 3.95e5[J/kg]  // Latent heat
  beta = 1e-4[1/K]  // Thermal expansion
  Tref = 911[K]  // Boussinesq reference (liquidus)
  mushC = 1e6[kg/(m^3*s)]  // Darcy mush coefficient C
  mushB = 1e-2  // Darcy mush regularisation B
  A_max = 1e8[kg/(m^3*s)]  // Cap on Darcy coefficient (stability)
  t_ramp = 0.05[s]  // Heat-flux ramp time at arc start
  g_acc = 9.81[m/s^2]  // Gravity magnitude (not g_const — reserved)

Variables
  var1 "Variables 1"
    xc = x0+v_weld*t  // Moving arc centre
    q_arc = q_max*min(1,t/t_ramp)*exp(-3*((x-xc)/rb)^2)  // Gaussian surface heat flux (ramped)
    fL = min(1,max(0,(T-Ts)/(Tl-Ts)))  // Linear liquid fraction
    A_mush = min(mushC*(1-fL)^2/(fL^3+mushB),A_max)  // Darcy–Carman–Kozeny coefficient (capped)
    tau_mar = fL*dsigma_dT*Tx  // Marangoni shear on top (Python BC)

Selections
  bndBottom: Explicit "Bottom" on boundaries 1
  bndRight: Explicit "Right" on boundaries 2
  bndTop: Explicit "Top" on boundaries 3
  bndLeft: Explicit "Left" on boundaries 4
  bndSides: Explicit "Sides" on boundaries 2, 4

Geometry
  geom1 "Geometry 1" (2D, length unit m)
    r1: Rectangle | size = {Lx, Lz}
    fin: Finalize "Form Union"

Materials
  mat_s: Common "Al 5182 solid" on all domains
    def "Basic"
      density = rho
      dynamicviscosity = mu
      thermalconductivity = k_s
      heatcapacity = cp_s
  mat_l: Common "Al 5182 liquid" on no domains
    def "Basic"
      density = rho
      dynamicviscosity = mu
      thermalconductivity = k_l
      heatcapacity = cp_l

Physics
  spf: LaminarFlow on all domains
    dependent variable u = {u, v, w}
    PhysicalModelProperty.Compressibility = Incompressible
    PhysicalModelProperty.IncludeGravity = 0
    fp1: FluidProperties (default) | rho_mat = userdef; rho = rho; mu_mat = userdef; mu = mu
    init1: init "Initial Values 1" (default)
    wallbc1: WallBC "Wall 1" (default)
    wallTop: WallBC "Wall" on selection bndTop | BoundaryCondition = Slip
    wconMar: WeakContribution "Marangoni shear (fL)" on selection bndTop
      integrationOrder = 4
      quadratureFrame = spatial
      weakExpression = test(u)*tau_mar
      automaticQuadrature = 1
    prpc1: PressurePointConstraint on points 1
    vf1: VolumeForce "Darcy + buoyancy" on all domains | F = {-A_mush*u, -A_mush*v+fL*rho*g_acc*beta*(T-Tref), 0}
  ht: HeatTransferInFluids on all domains
    dependent variable T
    PhysicalModelProperty.dz = 1[m]
    PhysicalModelProperty.Tref = Tref
    fluid1: FluidHeatTransferModel "Fluid 1" (default)
      phc1: PhaseChangeMaterial "Mushy zone Al 5182" on all domains
        T_pc12 = (Ts+Tl)/2
        dT_pc12 = Tl-Ts
        L_pc12 = L_latent
        MaterialPhase1 = mat_s
        MaterialPhase2 = mat_l
    init1: init "Initial Values 1" (default) | Tinit = T0
    ins1: ThermalInsulation (default)
    hfTop: HeatFluxBoundary "Arc Gaussian flux" on selection bndTop
      HeatFluxType = GeneralInwardHeatFlux
      q0_input = q_arc
    hfTopConv: HeatFluxBoundary "Top convection" on selection bndTop
      HeatFluxType = ConvectiveHeatFlux
      h = h_top
      Text_src = userdef
      Text = Ta
    sarTop: SurfaceToAmbientRadiation "Top radiation" on selection bndTop
      epsilon_rad_mat = userdef
      epsilon_rad = eps_rad
      Tamb_src = userdef
      Tamb = Ta
    hfBot: HeatFluxBoundary "Bottom convection" on selection bndBottom
      HeatFluxType = ConvectiveHeatFlux
      h = h_bot
      Text_src = userdef
      Text = Ta

Multiphysics
  nitf1: NonIsothermalFlow on all domains
    SpecifyDensity = CustomLinearizedDensity
    BoussinesqApproximation = 0
    rhoref = rho
    alphap = 0
    includeViscousDissipation = 0
    Fluid_physics = spf
    Heat_physics = ht

Mesh
  mesh1 "Mesh 1"
    size: MeshSizeDefault | hmax = 0.00268; hmin = 1.2E-5; hcurve = 0.3; hgrad = 1.3
    map1: Map "Mapped 1" on domains 1
      size1: Size on domains 1 | hmax = Lx/nx_mesh; hmin = Lz/nz_mesh; custom = on

Studies
  std1 "Transient weld pass"
    time: Transient "Time Dependent" | tlist = range(0,0.05,t_end); usertol = on; rtol = 5e-3

Solver configurations
  sol1 "Solution 1" (study std1)
    v1: Variables "Dependent Variables 1"
    t1: Time "Time-Dependent Solver 1" | tlist = range(0,0.05,t_end); initialstepbdf = 1e-4; maxstepbdf = 0.05
      fc1: FullyCoupled | linsolver = d1; dtech = const; maxiter = 75; damp = 0.7
      d1: Direct | linsolver = pardiso

Datasets
  dset1: Solution | solution = sol1

Derived values
  maxT: MaxSurface "Tmax" on all domains | data = dset1; expr = T; descr = Maximum temperature
  maxU: MaxSurface "|u|max" on all domains | data = dset1; expr = spf.U; descr = Maximum speed

Plots
  pgT: PlotGroup2D "Temperature" | data = dset1
    surf1: Surface | expr = T
    con1: Contour "Liquidus" | expr = T; levelmethod = levels; levels = Tl
  pgFL: PlotGroup2D "Liquid fraction fL" | data = dset1
    surf1: Surface | expr = fL
  pgVel: PlotGroup2D "Velocity and liquidus" | data = dset1
    surf1: Surface | expr = T
    arws1: ArrowSurface | expr = {u, v}
    con1: Contour | expr = T; levelmethod = levels; levels = Tl